// SBML level 3 version 1

model sauro1()
  // sauro1 translated by MOCCASIN
  // model units - substance: substance, time: second, volume: volume, area: area, length: metre, extent: substance

  // Compartments:
  compartment compartmentOne = 1 volume;

  // Species:
  species IFNb_mRNA in compartmentOne = 0;
  species IFNb_env in compartmentOne = 0;
  species STATP2n in compartmentOne = 0;
  species IRF7m in compartmentOne = 0;

  // Parameters:
  KK3 = 0.0043;
  KK2 = 0.002;
  b4 = 0.2;
  b1 = 0.4;
  k11 = 0.00036;
  vmax2 = 72000;
  NA = 6.02e23;
  ts = 0;
  k3 = 1.237763;
  k5 = 3600;
  k4 = 0.6931472;
  te = 10;
  C = 500000;
  r4 = 0.00036;
  r0 = 0.003;
  r1 = 0.003;
  r2 = 5.980066e-5;
  r3 = 0.36;
  TJtot = 0.0001;
  tao6 = 1;
  tao3 = 0.56;
  tao1 = 2.5;
  k1 = 0.2772589;

  // Assignment rules:
  myf := exp(-b1*t);
  myfs := exp(-b4*t);
  t := time;

  // Reactions:
  R_1: STATP2n => IRF7m + STATP2n; myfs*r4*STATP2n;
  R_2: IRF7m => ; k4*IRF7m;
  R_3: IFNb_env => IFNb_env + STATP2n; IFNb_env*(r3/(KK3 + IFNb_env));
  R_4: STATP2n => ; k3*STATP2n;
  R_5: IFNb_mRNA => IFNb_env + IFNb_mRNA; IFNb_mRNA*(r2/(KK2 + IFNb_mRNA));
  R_6: => IFNb_mRNA; myf*r1;
  R_7: IFNb_mRNA => ; k1*IFNb_mRNA;

  // Unit definitions:
  unit volume = litre;
  unit substance = mole;
  unit area = metre^2;
end
